*HEADING
Three-story shear building, CONN3D2 + DASHPOT1(alphaM) + CONNECTOR DAMPING(betaK)
*PREPRINT, ECHO=NO, MODEL=NO, HISTORY=NO
*NODE
 1, 0.0, 0.0, 0.0
 2, 1.0, 0.0, 0.0
 3, 2.0, 0.0, 0.0
 4, 3.0, 0.0, 0.0
** Shear springs (CONN3D2)
*ELEMENT, TYPE=CONN3D2, ELSET=CONN
1, 1, 2
2, 2, 3
3, 3, 4
*CONNECTOR BEHAVIOR, NAME=CONN_BEHAVIOR
*CONNECTOR ELASTICITY, COMPONENT=1
500000.0,
*CONNECTOR DAMPING, COMPONENT=1
1321.535,
*CONNECTOR SECTION, ELSET=CONN, BEHAVIOR=CONN_BEHAVIOR
 CARTESIAN,
 1, 0, 0
** Mass-proportional damping: DASHPOT1 to ground, c=alphaM*m = 0.733397*1000
*ELEMENT, TYPE=DASHPOT1, ELSET=DASH
11, 2
12, 3
13, 4
*DASHPOT, ELSET=DASH
1
733.397,
** Lumped masses
*ELEMENT, TYPE=MASS, ELSET=MAS
101, 2
102, 3
103, 4
*MASS, ELSET=MAS
1000.0,
*NSET, NSET=ROOF
4
*BOUNDARY
1, 1, 3
2, 2, 3
3, 2, 3
4, 2, 3
*AMPLITUDE, NAME=EQ_AMP, INPUT=eq_amplitude.txt
*STEP, NAME=DYNAMIC, INC=2686
*DYNAMIC, ALPHA=0.0, DIRECT
0.02, 53.7000, 0.02, 0.02
*CLOAD, AMPLITUDE=EQ_AMP
2, 1, -1000.0
3, 1, -1000.0
4, 1, -1000.0
*OUTPUT, FIELD, NUMBER INTERVAL=53
*NODE OUTPUT
U, A
*OUTPUT, HISTORY, FREQUENCY=1
*NODE OUTPUT, NSET=ROOF
U1, A1
*END STEP
