*HEADING
SDOF spring-mass test
*NODE
1, 0.0, 0.0, 0.0
2, 0.0, 1.0, 0.0
*ELEMENT, TYPE=SPRING2, ELSET=S1
1, 1, 2
*SPRING, ELSET=S1
1,
500000.0
*MASS
2, 1000.0
*BOUNDARY
1, 1, 1
2, 2, 3
*AMPLITUDE, NAME=A1, DEFINITION=TABULAR
0.0, 0.0
0.02, 0.26838668963
0.04, 0.54721499917
0.06, 0.83009788345
0.08, 1.1090133881
0.10, 1.3746970279
*STEP, NAME=S1
*DYNAMIC, DIRECT
0.02, 0.10, 0.02, 0.02
*CLOAD, AMPLITUDE=A1
2, 1, -1000.0
*OUTPUT, FIELD, FREQUENCY=1
*NODE OUTPUT
U, A
*END STEP
