*HEADING
SDOF test with connector - test output freq
*NODE
1, 0., 0., 0.
2, 0., 1., 0.
*ELEMENT, TYPE=CONN3D2, ELSET=CONN
1, 1, 2
*CONNECTOR SECTION, ELSET=CONN
CARTESIAN,
1, 0, 0
*CONNECTOR BEHAVIOR, NAME=BEH1
*CONNECTOR ELASTICITY, COMPONENT=1
500000.
*ELEMENT, TYPE=MASS, ELSET=MAS
101, 2
*MASS, ELSET=MAS
1000.
*BOUNDARY
1, 1, 1
2, 2, 3
*AMPLITUDE, NAME=A1
0., 0.
0.02, 0.2684
0.04, 0.5472
0.06, 0.8301
0.08, 1.1090
0.10, 1.3747
*STEP
*DYNAMIC, DIRECT
0.02, 0.10, 0.02, 0.02
*OUTPUT, FIELD, NUMBER INTERVAL=5
*NODE OUTPUT
U
*OUTPUT, HISTORY
*NODE OUTPUT, NSET=ROOF
U1
*NSET, NSET=ROOF
2
*END STEP
