*HEADING
SDOF spring-mass test
*NODE
1, 0.0, 0.0, 0.0
2, 0.0, 1.0, 0.0
*ELEMENT, TYPE=SPRING2, ELSET=S1
1, 1, 2
*SPRING, ELSET=S1
1
500000.0
*MASS, ELSET=S1
1000.0
*BOUNDARY
1, 1, 6
2, 2, 6
*AMPLITUDE, NAME=A1
0.0, 0.0
0.02, 0.2684
0.04, 0.5472
0.06, 0.8301
0.08, 1.1090
0.10, 1.3747
*STEP, NAME=S1
*DYNAMIC, ALPHA=0.0, DIRECT
0.02, 0.10, 0.02, 0.02
*CLOAD, AMPLITUDE=A1
2, 1, -1000.0
*OUTPUT, FIELD, FREQUENCY=1
*NODE OUTPUT
U, A
*END STEP
