*HEADING
SDOF test - nodes along X axis
*NODE
1, 0., 0., 0.
2, 1., 0., 0.
*ELEMENT, TYPE=CONN3D2, ELSET=CONN
1, 1, 2
*CONNECTOR SECTION, ELSET=CONN
CARTESIAN,
1, 0, 0
*CONNECTOR BEHAVIOR, NAME=BEH1
*CONNECTOR ELASTICITY, COMPONENT=1
500000.
*ELEMENT, TYPE=MASS, ELSET=MAS
101, 2
*MASS, ELSET=MAS
1000.
*BOUNDARY
1, 1, 3
2, 2, 3
*AMPLITUDE, NAME=A1
0., 0.
0.02, 0.268387
0.04, 0.547215
0.06, 0.830098
0.08, 1.109013
0.10, 1.374697
*STEP
*DYNAMIC, DIRECT
0.02, 0.10, 0.02, 0.02
*CLOAD, AMPLITUDE=A1
2, 1, -1000.0
*OUTPUT, FIELD, NUMBER INTERVAL=5
*NODE OUTPUT
U
*END STEP
