*HEADING
4-story structure - direct force seismic analysis
*NODE
1, 0.0, 0.0
2, 1.0, 0.0
3, 2.0, 0.0
4, 3.0, 0.0
5, 4.0, 0.0
*NSET, NSET=BASE
1
*NSET, NSET=ISO
2
*NSET, NSET=S2
3
*NSET, NSET=S3
4
*NSET, NSET=S4
5
*NSET, NSET=ALLFLOORS
2,3,4,5
*ELEMENT, TYPE=SPRING2, ELSET=EL-ISO
101, 1, 2
*SPRING, ELSET=EL-ISO
1, 1
 50000000.0
*ELEMENT, TYPE=SPRING2, ELSET=EL-S2
201, 2, 3
*SPRING, ELSET=EL-S2, NONLINEAR
1, 1
 -1225000.0, -100.0
 -1225000.0, -0.0050000000
 0.0, 0.0
 1225000.0, 0.0050000000
 1225000.0, 100.0
*ELEMENT, TYPE=SPRING2, ELSET=EL-S3
202, 3, 4
*SPRING, ELSET=EL-S3, NONLINEAR
1, 1
 -975000.0, -100.0
 -975000.0, -0.0050000000
 0.0, 0.0
 975000.0, 0.0050000000
 975000.0, 100.0
*ELEMENT, TYPE=SPRING2, ELSET=EL-S4
203, 4, 5
*SPRING, ELSET=EL-S4, NONLINEAR
1, 1
 -490000.0, -100.0
 -490000.0, -0.0050000000
 0.0, 0.0
 490000.0, 0.0050000000
 490000.0, 100.0
*ELEMENT, TYPE=DASHPOT2, ELSET=EL-DASH-ISO
301, 1, 2
*DASHPOT, ELSET=EL-DASH-ISO
1, 1
 1000000.0
*ELEMENT, TYPE=DASHPOT2, ELSET=EL-DK-0
401, 1, 2
*DASHPOT, ELSET=EL-DK-0
1, 1
 173850.0
*ELEMENT, TYPE=DASHPOT2, ELSET=EL-DK-1
402, 2, 3
*DASHPOT, ELSET=EL-DK-1
1, 1
 851865.0
*ELEMENT, TYPE=DASHPOT2, ELSET=EL-DK-2
403, 3, 4
*DASHPOT, ELSET=EL-DK-2
1, 1
 678015.0
*ELEMENT, TYPE=DASHPOT2, ELSET=EL-DK-3
404, 4, 5
*DASHPOT, ELSET=EL-DK-3
1, 1
 340746.0
*ELEMENT, TYPE=DASHPOT1, ELSET=EL-DM-0
501, 2
*DASHPOT, ELSET=EL-DM-0
1
 126482.2
*ELEMENT, TYPE=DASHPOT1, ELSET=EL-DM-1
502, 3
*DASHPOT, ELSET=EL-DM-1
1
 136600.8
*ELEMENT, TYPE=DASHPOT1, ELSET=EL-DM-2
503, 4
*DASHPOT, ELSET=EL-DM-2
1
 136600.8
*ELEMENT, TYPE=DASHPOT1, ELSET=EL-DM-3
504, 5
*DASHPOT, ELSET=EL-DM-3
1
 91067.2
*ELEMENT, TYPE=MASS, ELSET=EL-M-0
601, 2
*MASS, ELSET=EL-M-0
 250000.0
*ELEMENT, TYPE=MASS, ELSET=EL-M-1
602, 3
*MASS, ELSET=EL-M-1
 270000.0
*ELEMENT, TYPE=MASS, ELSET=EL-M-2
603, 4
*MASS, ELSET=EL-M-2
 270000.0
*ELEMENT, TYPE=MASS, ELSET=EL-M-3
604, 5
*MASS, ELSET=EL-M-3
 180000.0
*AMPLITUDE, NAME=EQ, INPUT=eq_ampl.txt
*BOUNDARY
BASE, 1, 2
ALLFLOORS, 2, 2
*STEP, NAME=SEISMIC, NLGEOM=NO, INC=2000
*DYNAMIC, ALPHA=0.0, HAFTOL=1.0E6
0.010000, 19.000000, 1e-15, 0.010000
*CLOAD, AMPLITUDE=EQ
ISO, 1, -250000.0
S2, 1, -270000.0
S3, 1, -270000.0
S4, 1, -180000.0
*RESTART, WRITE, FREQUENCY=0
*OUTPUT, FIELD, FREQUENCY=10
*NODE OUTPUT, NSET=ALLFLOORS
U, V, A
*NODE OUTPUT, NSET=BASE
RF
*OUTPUT, HISTORY, FREQUENCY=1
*NODE OUTPUT, NSET=S4
U1, A1
*NODE OUTPUT, NSET=ISO
U1
*END STEP
