*HEADING
Example 5: 4-story seismically isolated structure
*PREPRINT,ECHO=NO,MODEL=NO,HISTORY=NO
*NODE
1, 0.0, 0.0, 0.0
2, 0.0, 0.0, 0.0
3, 0.0, 0.0, 0.0
4, 0.0, 0.0, 0.0
5, 0.0, 0.0, 0.0
*NSET,NSET=BASE
1
*NSET,NSET=TOP
5
*ELEMENT,TYPE=CONN3D2,ELSET=E1
1, 1, 2
*ELEMENT,TYPE=CONN3D2,ELSET=E2
2, 2, 3
*ELEMENT,TYPE=CONN3D2,ELSET=E3
3, 3, 4
*ELEMENT,TYPE=CONN3D2,ELSET=E4
4, 4, 5
*ELEMENT,TYPE=MASS,ELSET=MASS1
101, 2
*MASS,ELSET=MASS1
250000.0,
*ELEMENT,TYPE=MASS,ELSET=MASS2
102, 3
*MASS,ELSET=MASS2
270000.0,
*ELEMENT,TYPE=MASS,ELSET=MASS3
103, 4
*MASS,ELSET=MASS3
270000.0,
*ELEMENT,TYPE=MASS,ELSET=MASS4
104, 5
*MASS,ELSET=MASS4
180000.0,
*ELSET,ELSET=MASSEL
MASS1,MASS2,MASS3,MASS4
*ELEMENT,TYPE=DASHPOT1,ELSET=DAMP_M1
201, 2
*DASHPOT,ELSET=DAMP_M1
1
126482.232933
*ELEMENT,TYPE=DASHPOT1,ELSET=DAMP_M2
202, 3
*DASHPOT,ELSET=DAMP_M2
1
136600.811568
*ELEMENT,TYPE=DASHPOT1,ELSET=DAMP_M3
203, 4
*DASHPOT,ELSET=DAMP_M3
1
136600.811568
*ELEMENT,TYPE=DASHPOT1,ELSET=DAMP_M4
204, 5
*DASHPOT,ELSET=DAMP_M4
1
91067.207712
*CONNECTOR BEHAVIOR,NAME=BHV1
*CONNECTOR ELASTICITY,COMPONENT=1
50000000.0,
*CONNECTOR PLASTICITY,COMPONENT=1
500000.0,
*CONNECTOR HARDENING, TYPE=KINEMATIC
500000.0, 0.0
631578.9, 0.050000
*CONNECTOR DAMPING, COMPONENT=1
173825.638704,
*CONNECTOR ELASTICITY,COMPONENT=2
1.0E12,
*CONNECTOR ELASTICITY,COMPONENT=3
1.0E12,
*CONNECTOR SECTION,ELSET=E1,BEHAVIOR=BHV1
CARTESIAN,
*CONNECTOR BEHAVIOR,NAME=BHV2
*CONNECTOR ELASTICITY,COMPONENT=1
245000000.0,
*CONNECTOR PLASTICITY,COMPONENT=1
1225000.0,
*CONNECTOR HARDENING, TYPE=KINEMATIC
1225000.0, 0.0
1225000.0, 1.0
*CONNECTOR DAMPING, COMPONENT=1
851745.629648,
*CONNECTOR ELASTICITY,COMPONENT=2
1.0E12,
*CONNECTOR ELASTICITY,COMPONENT=3
1.0E12,
*CONNECTOR SECTION,ELSET=E2,BEHAVIOR=BHV2
CARTESIAN,
*CONNECTOR BEHAVIOR,NAME=BHV3
*CONNECTOR ELASTICITY,COMPONENT=1
195000000.0,
*CONNECTOR PLASTICITY,COMPONENT=1
975000.0,
*CONNECTOR HARDENING, TYPE=KINEMATIC
975000.0, 0.0
975000.0, 1.0
*CONNECTOR DAMPING, COMPONENT=1
677919.990944,
*CONNECTOR ELASTICITY,COMPONENT=2
1.0E12,
*CONNECTOR ELASTICITY,COMPONENT=3
1.0E12,
*CONNECTOR SECTION,ELSET=E3,BEHAVIOR=BHV3
CARTESIAN,
*CONNECTOR BEHAVIOR,NAME=BHV4
*CONNECTOR ELASTICITY,COMPONENT=1
98000000.0,
*CONNECTOR PLASTICITY,COMPONENT=1
490000.0,
*CONNECTOR HARDENING, TYPE=KINEMATIC
490000.0, 0.0
490000.0, 1.0
*CONNECTOR DAMPING, COMPONENT=1
340698.251859,
*CONNECTOR ELASTICITY,COMPONENT=2
1.0E12,
*CONNECTOR ELASTICITY,COMPONENT=3
1.0E12,
*CONNECTOR SECTION,ELSET=E4,BEHAVIOR=BHV4
CARTESIAN,
*BOUNDARY
BASE, 1, 3
*AMPLITUDE,NAME=GM,TIME=TOTAL TIME
0.000000, -3.032531e-03
0.010000, 2.649629e-03
0.020000, -3.133421e-03
0.030000, 3.184785e-03
0.040000, 7.024090e-03
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18.990000, 9.650685e-04
*STEP,NAME=DYNAMIC,NLGEOM=NO,INC=1910
*DYNAMIC,ALPHA=0.0,DIRECT
0.010000,18.990000,0.000100,0.010000
*CLOAD, AMPLITUDE=GM
2, 1, -981000.000000
3, 1, -1059480.000000
4, 1, -1059480.000000
5, 1, -706320.000000
*OUTPUT, FIELD, FREQUENCY=1
*NODE OUTPUT
U,
A,
V,
*ELEMENT OUTPUT
CTF,
*END STEP
