**
** 2D Three-Story Two-Bay Base-Isolated Steel Frame
** ABAQUS/Standard - Elastic eigenvalue validation
** Bouc-Wen nonlinear time history BLOCKED: no Fortran compiler for UEL
** Units: N, m, kg, s, Pa
**
*HEADING
2D Base-Isolated Frame - Elastic Eigenvalue Validation
**
** === NODES ===
** Level 0 (isolation top): 1-3; Level 1 (floor1): 4-6
** Level 2 (floor2): 7-9; Level 3 (roof): 10-12
*NODE
  1,   0.0, 0.0
  2,   6.0, 0.0
  3,  12.0, 0.0
  4,   0.0, 3.6
  5,   6.0, 3.6
  6,  12.0, 3.6
  7,   0.0, 7.2
  8,   6.0, 7.2
  9,  12.0, 7.2
 10,   0.0, 10.8
 11,   6.0, 10.8
 12,  12.0, 10.8
**
** Ground nodes (fixed): 13-15
*NODE
 13,   0.0, -0.001
 14,   6.0, -0.001
 15,  12.0, -0.001
**
** === NODE SETS ===
*NSET, NSET=BASE
 1, 2, 3
*NSET, NSET=FLOOR1
 4, 5, 6
*NSET, NSET=FLOOR2
 7, 8, 9
*NSET, NSET=FLOOR3
10,11,12
*NSET, NSET=GROUND
13,14,15
**
** === MATERIAL ===
*MATERIAL, NAME=STEEL
*ELASTIC
 2.06E11, 0.30
**
** === BEAM SECTIONS ===
*BEAM GENERAL SECTION, ELSET=COLUMNS, MATERIAL=STEEL, SECTION=GENERAL
 0.020, 8.0E-04, 0.0, 0.0, 0.0
 0.0, 0.0, -1.0
*BEAM GENERAL SECTION, ELSET=BEAMS, MATERIAL=STEEL, SECTION=GENERAL
 0.015, 4.5E-04, 0.0, 0.0, 0.0
 0.0, 0.0, -1.0
**
** === BEAM ELEMENTS (B21 - 2D Timoshenko) ===
*ELEMENT, TYPE=B21, ELSET=COLUMNS
 1, 1, 4
 2, 2, 5
 3, 3, 6
 4, 4, 7
 5, 5, 8
 6, 6, 9
 7, 7,10
 8, 8,11
 9, 9,12
*ELEMENT, TYPE=B21, ELSET=BEAMS
10, 4, 5
11, 5, 6
12, 7, 8
13, 8, 9
14,10,11
15,11,12
**
** === SPRING ELEMENTS (SPRINGA between ground and base nodes) ===
** Horizontal (DOF1): k0=2e6; Vertical (DOF2): kv=1e10
*ELEMENT, TYPE=SPRINGA, ELSET=ISOLATORS
16, 13, 1
17, 14, 2
18, 15, 3
*SPRING, ELSET=ISOLATORS
1
2.0E6
2
1.0E10
**
** === BOUNDARY CONDITIONS ===
*BOUNDARY
GROUND, 1, 6
**
** === CONCENTRATED MASSES (DOF1=UX only, 83333.33 kg per floor node) ===
*MASS, ELSET=FLOOR1, TYPE=POINT
 83333.33,
*MASS, ELSET=FLOOR2, TYPE=POINT
 83333.33,
*MASS, ELSET=FLOOR3, TYPE=POINT
 83333.33,
**
** === RIGID DIAPHRAGM (equalDOF for UX at each floor) ===
*EQUATION
2
 4, 1, -1.0,  5, 1, 1.0
*EQUATION
2
 5, 1, -1.0,  6, 1, 1.0
*EQUATION
2
 7, 1, -1.0,  8, 1, 1.0
*EQUATION
2
 8, 1, -1.0,  9, 1, 1.0
*EQUATION
2
10, 1, -1.0,  11, 1, 1.0
*EQUATION
2
11, 1, -1.0,  12, 1, 1.0
**
** === FREQUENCY ANALYSIS ===
*STEP, NAME=FREQUENCY
*FREQUENCY, EIGENSOLVER=LANCZOS, NORMALIZATION=MASS
 8,
*END STEP
