*Heading
Three-story linear shear building; relative-coordinate earthquake loading
** Units: kg, m, s, N
*Preprint, echo=NO, model=NO, history=NO, contact=NO
*Node
1, 0., 0., 0.
2, 0., 1., 0.
3, 0., 2., 0.
999, 0., -1., 0.
*Nset, nset=FLOORS
1, 2, 3
*Nset, nset=TOP
3
*Nset, nset=GROUND
999
*Element, type=MASS, elset=MASS1
101, 1
*Element, type=MASS, elset=MASS2
102, 2
*Element, type=MASS, elset=MASS3
103, 3
*Mass, elset=MASS1
1.000000000000e+03
*Mass, elset=MASS2
1.000000000000e+03
*Mass, elset=MASS3
1.000000000000e+03
*Element, type=SPRING2, elset=SPRING_STORY1
201, 999, 1
*Element, type=SPRING2, elset=SPRING_STORY2
202, 1, 2
*Element, type=SPRING2, elset=SPRING_STORY3
203, 2, 3
*Spring, elset=SPRING_STORY1
1, 1
5.000000000000e+05
*Spring, elset=SPRING_STORY2
1, 1
5.000000000000e+05
*Spring, elset=SPRING_STORY3
1, 1
5.000000000000e+05
*Element, type=DASHPOT2, elset=DASHPOT_STORY1
301, 999, 1
*Element, type=DASHPOT2, elset=DASHPOT_STORY2
302, 1, 2
*Element, type=DASHPOT2, elset=DASHPOT_STORY3
303, 2, 3
*Dashpot, elset=DASHPOT_STORY1
1, 1
1.321536407777e+03
*Dashpot, elset=DASHPOT_STORY2
1, 1
1.321536407777e+03
*Dashpot, elset=DASHPOT_STORY3
1, 1
1.321536407777e+03
*Element, type=DASHPOT2, elset=DASHPOT_MASS1
401, 999, 1
*Element, type=DASHPOT2, elset=DASHPOT_MASS2
402, 999, 2
*Element, type=DASHPOT2, elset=DASHPOT_MASS3
403, 999, 3
*Dashpot, elset=DASHPOT_MASS1
1, 1
7.333973763454e+02
*Dashpot, elset=DASHPOT_MASS2
1, 1
7.333973763454e+02
*Dashpot, elset=DASHPOT_MASS3
1, 1
7.333973763454e+02
*Boundary
999, 1, 1, 0.
*Amplitude, name=EQFORCE, definition=TABULAR, time=TOTAL TIME, smooth=0.
0.000000000000e+00, -5.684194433033e+01
2.000000000000e-02, -4.630319896657e+01
4.000000000000e-02, -3.565234853001e+01
6.000000000000e-02, -2.500148709952e+01
8.000000000000e-02, -1.849885417450e+01
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5.370000000000e+01, -3.654925507600e+01
*Step, name=EQ, nlgeom=NO, inc=3000
*Dynamic, direct, alpha=0.
2.000000000000e-02, 5.370000000000e+01
*Cload, amplitude=EQFORCE
1, 1, 1.
2, 1, 1.
3, 1, 1.
*Output, history, frequency=1
*Node Output, nset=TOP
U1, V1, A1
*End Step
