*Heading
Four-story isolated shear-building, SI units
*Preprint, echo=NO, model=NO, history=NO, contact=NO
*Node
1, 0., 0., 0.
2, 0., 0., 0.
3, 0., 0., 0.
4, 0., 0., 0.
5, 0., 0., 0.
*Nset, nset=GROUND
1
*Nset, nset=FLOORS
2, 3, 4, 5
*Nset, nset=RESP_NODES
2, 3, 4, 5
*Element, type=MASS, elset=MASS_NODE_2
102, 2
*Mass, elset=MASS_NODE_2
5.000000000000e+02
*Element, type=MASS, elset=MASS_NODE_3
103, 3
*Mass, elset=MASS_NODE_3
1.000000000000e+03
*Element, type=MASS, elset=MASS_NODE_4
104, 4
*Mass, elset=MASS_NODE_4
1.000000000000e+03
*Element, type=MASS, elset=MASS_NODE_5
105, 5
*Mass, elset=MASS_NODE_5
1.000000000000e+03
*Element, type=SPRING2, elset=SPRING_1
200, 1, 2
*Spring, elset=SPRING_1
1, 1
2.000000000000e+05
*Element, type=SPRING2, elset=SPRING_2
201, 2, 3
*Spring, elset=SPRING_2
1, 1
5.000000000000e+05
*Element, type=SPRING2, elset=SPRING_3
202, 3, 4
*Spring, elset=SPRING_3
1, 1
5.000000000000e+05
*Element, type=SPRING2, elset=SPRING_4
203, 4, 5
*Spring, elset=SPRING_4
1, 1
5.000000000000e+05
*Element, type=DASHPOT2, elset=STORY_DASHPOT_1
204, 1, 2
*Dashpot, elset=STORY_DASHPOT_1
1, 1
2.712561598541e+03
*Element, type=DASHPOT2, elset=STORY_DASHPOT_2
205, 2, 3
*Dashpot, elset=STORY_DASHPOT_2
1, 1
1.781403996353e+03
*Element, type=DASHPOT2, elset=STORY_DASHPOT_3
206, 3, 4
*Dashpot, elset=STORY_DASHPOT_3
1, 1
1.781403996353e+03
*Element, type=DASHPOT2, elset=STORY_DASHPOT_4
207, 4, 5
*Dashpot, elset=STORY_DASHPOT_4
1, 1
1.781403996353e+03
*Element, type=DASHPOT2, elset=MASS_DASHPOT_2
208, 1, 2
*Dashpot, elset=MASS_DASHPOT_2
1, 1
2.409935539751e+02
*Element, type=DASHPOT2, elset=MASS_DASHPOT_3
209, 1, 3
*Dashpot, elset=MASS_DASHPOT_3
1, 1
4.819871079501e+02
*Element, type=DASHPOT2, elset=MASS_DASHPOT_4
210, 1, 4
*Dashpot, elset=MASS_DASHPOT_4
1, 1
4.819871079501e+02
*Element, type=DASHPOT2, elset=MASS_DASHPOT_5
211, 1, 5
*Dashpot, elset=MASS_DASHPOT_5
1, 1
4.819871079501e+02
*Boundary
1, 1, 3
2, 2, 3
3, 2, 3
4, 2, 3
5, 2, 3
*Amplitude, name=GM_ACCEL, definition=TABULAR, time=TOTAL TIME
0.000000000000e+00, 5.682253347268e-02, 2.000000000000e-02, 4.628738696692e-02, 4.000000000000e-02, 3.564017367093e-02, 6.000000000000e-02, 2.499294938476e-02
8.000000000000e-02, 1.849253703265e-02, 1.000000000000e-01, 4.908928751643e-02, 1.200000000000e-01, 7.968603800021e-02, 1.400000000000e-01, 7.845320439607e-02
1.600000000000e-01, 5.121873237367e-02, 1.800000000000e-01, 2.398426035126e-02, 2.000000000000e-01, -3.295029595097e-03, 2.200000000000e-01, 5.312402167008e-02
2.400000000000e-01, 1.096103327917e-01, 2.600000000000e-01, 1.569063978020e-01, 2.800000000000e-01, 1.221628353841e-01, 3.000000000000e-01, 8.629851714256e-02
3.200000000000e-01, 5.099457681285e-02, 3.400000000000e-01, 1.569063648314e-02, 3.600000000000e-01, -1.972538162697e-02, 3.800000000000e-01, -2.712239424200e-02
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5.368000000000e+01, 5.883990054951e-02, 5.370000000000e+01, 3.653677393385e-02
*Step, name=GM_STEP, nlgeom=NO, inc=2696
*Dynamic, direct, alpha=0.
2.000000000000e-02, 5.370000000000e+01
*Cload, amplitude=GM_ACCEL
2, 1, -5.000000000000e+02
3, 1, -1.000000000000e+03
4, 1, -1.000000000000e+03
5, 1, -1.000000000000e+03
*Output, field, frequency=1
*Node Output, nset=RESP_NODES
U, V, A
*End Step
