*HEADING
Four-story isolated shear building; generated in this run for ABAQUS verification.
*PREPRINT, ECHO=NO, MODEL=NO, HISTORY=NO, CONTACT=NO
** Nodes are placed one metre apart; truss area is 1 m^2, so E = story stiffness.
*NODE
1, 0.0, 0.0
2, 1.0, 0.0
3, 2.0, 0.0
4, 3.0, 0.0
5, 4.0, 0.0
*NSET, NSET=NRESP
2, 3, 4, 5
*NSET, NSET=NTOP
5
*NSET, NSET=NISO
2
*NSET, NSET=NGROUND
1
*ELEMENT, TYPE=T2D2, ELSET=TRUSS1
1, 1, 2
*ELEMENT, TYPE=T2D2, ELSET=TRUSS2
2, 2, 3
*ELEMENT, TYPE=T2D2, ELSET=TRUSS3
3, 3, 4
*ELEMENT, TYPE=T2D2, ELSET=TRUSS4
4, 4, 5
*ELSET, ELSET=TRUSSES
1, 2, 3, 4
*SOLID SECTION, ELSET=TRUSS1, MATERIAL=MAT1
1.0
*MATERIAL, NAME=MAT1
*DENSITY
1.0e-12
*ELASTIC
5.000000000000e+07, 0.0
*SOLID SECTION, ELSET=TRUSS2, MATERIAL=MAT2
1.0
*MATERIAL, NAME=MAT2
*DENSITY
1.0e-12
*ELASTIC
2.450000000000e+08, 0.0
*PLASTIC
1.225000000000e+06, 0.0
*SOLID SECTION, ELSET=TRUSS3, MATERIAL=MAT3
1.0
*MATERIAL, NAME=MAT3
*DENSITY
1.0e-12
*ELASTIC
1.950000000000e+08, 0.0
*PLASTIC
9.750000000000e+05, 0.0
*SOLID SECTION, ELSET=TRUSS4, MATERIAL=MAT4
1.0
*MATERIAL, NAME=MAT4
*DENSITY
1.0e-12
*ELASTIC
9.800000000000e+07, 0.0
*PLASTIC
4.900000000000e+05, 0.0
*ELEMENT, TYPE=MASS, ELSET=MASS1
101, 2
*MASS, ELSET=MASS1
2.500000000000e+05
*ELEMENT, TYPE=MASS, ELSET=MASS2
102, 3
*MASS, ELSET=MASS2
2.700000000000e+05
*ELEMENT, TYPE=MASS, ELSET=MASS3
103, 4
*MASS, ELSET=MASS3
2.700000000000e+05
*ELEMENT, TYPE=MASS, ELSET=MASS4
104, 5
*MASS, ELSET=MASS4
1.800000000000e+05
*ELEMENT, TYPE=DASHPOT2, ELSET=DASH_STORY1
201, 1, 2
*DASHPOT, ELSET=DASH_STORY1
1, 1
1.086689910232e+06
*ELEMENT, TYPE=DASHPOT2, ELSET=DASH_STORY2
202, 2, 3
*DASHPOT, ELSET=DASH_STORY2
1, 1
4.247805601370e+05
*ELEMENT, TYPE=DASHPOT2, ELSET=DASH_STORY3
203, 3, 4
*DASHPOT, ELSET=DASH_STORY3
1, 1
3.380906499050e+05
*ELEMENT, TYPE=DASHPOT2, ELSET=DASH_STORY4
204, 4, 5
*DASHPOT, ELSET=DASH_STORY4
1, 1
1.699122240548e+05
*ELEMENT, TYPE=DASHPOT2, ELSET=DASH_MASS1
205, 1, 2
*DASHPOT, ELSET=DASH_MASS1
1, 1
1.451823241489e+05
*ELEMENT, TYPE=DASHPOT2, ELSET=DASH_MASS2
206, 1, 3
*DASHPOT, ELSET=DASH_MASS2
1, 1
1.567969100808e+05
*ELEMENT, TYPE=DASHPOT2, ELSET=DASH_MASS3
207, 1, 4
*DASHPOT, ELSET=DASH_MASS3
1, 1
1.567969100808e+05
*ELEMENT, TYPE=DASHPOT2, ELSET=DASH_MASS4
208, 1, 5
*DASHPOT, ELSET=DASH_MASS4
1, 1
1.045312733872e+05
*BOUNDARY
1, 1, 2, 0.0
2, 2, 2, 0.0
3, 2, 2, 0.0
4, 2, 2, 0.0
5, 2, 2, 0.0
*AMPLITUDE, NAME=AG, TIME=TOTAL TIME
0.000000000000e+00, -1.189965067191e-02, 1.000000000000e-02, 1.039714598720e-02, 2.000000000000e-02, -1.229554377342e-02, 3.000000000000e-02, 1.249709746590e-02
4.000000000000e-02, 2.756252942552e-02, 5.000000000000e-02, 3.971277108434e-02, 6.000000000000e-02, 1.746754043758e-02, 7.000000000000e-02, -7.504317485990e-03
8.000000000000e-02, 1.652170077268e-04, 9.000000000000e-02, -2.401208551879e-02, 1.000000000000e-01, 8.983865378662e-03, 1.100000000000e-01, -2.402775365331e-02
1.200000000000e-01, -5.895333944062e-02, 1.300000000000e-01, -4.099894643071e-02, 1.400000000000e-01, -2.089268885084e-02, 1.500000000000e-01, 1.588828172680e-02
1.600000000000e-01, 2.779234525938e-02, 1.700000000000e-01, -1.006191732425e-02, 1.800000000000e-01, 2.266060975101e-02, 1.900000000000e-01, 6.454081437444e-02
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1.896000000000e+01, -2.907083528661e-03, 1.897000000000e+01, -8.599128385593e-04, 1.898000000000e+01, 1.412566617598e-03, 1.899000000000e+01, 3.786928614300e-03
*STEP, NAME=Dynamic, NLGEOM=NO, INC=100000
*DYNAMIC, ALPHA=0.0
1.000000000000e-02, 1.899000000000e+01, 1.000000000000e-08, 1.000000000000e-02
*CLOAD, AMPLITUDE=AG
2, 1, -2.500000000000e+05
3, 1, -2.700000000000e+05
4, 1, -2.700000000000e+05
5, 1, -1.800000000000e+05
*OUTPUT, FIELD, TIME INTERVAL=0.01
*NODE OUTPUT, NSET=NRESP
U, V, A
*ELEMENT OUTPUT, ELSET=TRUSSES
S, E, PE, PEEQ
*END STEP
