*HEADING
Four-DOF isolated shear building; SI units; relative-coordinate earthquake loading.
*PREPRINT, ECHO=NO, MODEL=YES, HISTORY=NO, CONTACT=NO
*NODE, NSET=ALLNODES
1000, 0., 0., 0.
1, 0., 0., 0.
2, 0., 0., 0.
3, 0., 0., 0.
4, 0., 0., 0.
*NSET, NSET=MASSNODES
1, 2, 3, 4
*NSET, NSET=BASE
1000
*ELEMENT, TYPE=MASS, ELSET=MASS1
101, 1
*MASS, ELSET=MASS1
2.500000000000e+05
*ELEMENT, TYPE=MASS, ELSET=MASS2
102, 2
*MASS, ELSET=MASS2
2.700000000000e+05
*ELEMENT, TYPE=MASS, ELSET=MASS3
103, 3
*MASS, ELSET=MASS3
2.700000000000e+05
*ELEMENT, TYPE=MASS, ELSET=MASS4
104, 4
*MASS, ELSET=MASS4
1.800000000000e+05
*ELEMENT, TYPE=CONN3D2, ELSET=E_STORY1
1, 1000, 1
*ELEMENT, TYPE=CONN3D2, ELSET=E_STORY2
2, 1, 2
*ELEMENT, TYPE=CONN3D2, ELSET=E_STORY3
3, 2, 3
*ELEMENT, TYPE=CONN3D2, ELSET=E_STORY4
4, 3, 4
*ELSET, ELSET=STORY_CONNECTORS
1, 2, 3, 4
*ELEMENT, TYPE=CONN3D2, ELSET=E_MASSDAMP1
21, 1000, 1
*ELEMENT, TYPE=CONN3D2, ELSET=E_MASSDAMP2
22, 1000, 2
*ELEMENT, TYPE=CONN3D2, ELSET=E_MASSDAMP3
23, 1000, 3
*ELEMENT, TYPE=CONN3D2, ELSET=E_MASSDAMP4
24, 1000, 4
*CONNECTOR BEHAVIOR, NAME=B_STORY1
*CONNECTOR ELASTICITY, COMPONENT=1
5.000000000000e+07
*CONNECTOR PLASTICITY, COMPONENT=1
*CONNECTOR HARDENING, TYPE=KINEMATIC, DEFINITION=PARAMETERS
5.000000000000e+05, 2.631578947368e+06, 0.0
*CONNECTOR DAMPING, COMPONENT=1
8.668991023204e+04
*CONNECTOR BEHAVIOR, NAME=B_STORY2
*CONNECTOR ELASTICITY, COMPONENT=1
2.450000000000e+08
*CONNECTOR PLASTICITY, COMPONENT=1
*CONNECTOR HARDENING, TYPE=KINEMATIC, DEFINITION=PARAMETERS
1.225000000000e+06, 0.000000000000e+00, 0.0
*CONNECTOR DAMPING, COMPONENT=1
4.247805601370e+05
*CONNECTOR BEHAVIOR, NAME=B_STORY3
*CONNECTOR ELASTICITY, COMPONENT=1
1.950000000000e+08
*CONNECTOR PLASTICITY, COMPONENT=1
*CONNECTOR HARDENING, TYPE=KINEMATIC, DEFINITION=PARAMETERS
9.750000000000e+05, 0.000000000000e+00, 0.0
*CONNECTOR DAMPING, COMPONENT=1
3.380906499050e+05
*CONNECTOR BEHAVIOR, NAME=B_STORY4
*CONNECTOR ELASTICITY, COMPONENT=1
9.800000000000e+07
*CONNECTOR PLASTICITY, COMPONENT=1
*CONNECTOR HARDENING, TYPE=KINEMATIC, DEFINITION=PARAMETERS
4.900000000000e+05, 0.000000000000e+00, 0.0
*CONNECTOR DAMPING, COMPONENT=1
1.699122240548e+05
*CONNECTOR BEHAVIOR, NAME=B_MASSDAMP1
*CONNECTOR DAMPING, COMPONENT=1
1.451823241489e+05
*CONNECTOR BEHAVIOR, NAME=B_MASSDAMP2
*CONNECTOR DAMPING, COMPONENT=1
1.567969100808e+05
*CONNECTOR BEHAVIOR, NAME=B_MASSDAMP3
*CONNECTOR DAMPING, COMPONENT=1
1.567969100808e+05
*CONNECTOR BEHAVIOR, NAME=B_MASSDAMP4
*CONNECTOR DAMPING, COMPONENT=1
1.045312733872e+05
*CONNECTOR SECTION, ELSET=E_STORY1, BEHAVIOR=B_STORY1
CARTESIAN
*CONNECTOR SECTION, ELSET=E_STORY2, BEHAVIOR=B_STORY2
CARTESIAN
*CONNECTOR SECTION, ELSET=E_STORY3, BEHAVIOR=B_STORY3
CARTESIAN
*CONNECTOR SECTION, ELSET=E_STORY4, BEHAVIOR=B_STORY4
CARTESIAN
*CONNECTOR SECTION, ELSET=E_MASSDAMP1, BEHAVIOR=B_MASSDAMP1
CARTESIAN
*CONNECTOR SECTION, ELSET=E_MASSDAMP2, BEHAVIOR=B_MASSDAMP2
CARTESIAN
*CONNECTOR SECTION, ELSET=E_MASSDAMP3, BEHAVIOR=B_MASSDAMP3
CARTESIAN
*CONNECTOR SECTION, ELSET=E_MASSDAMP4, BEHAVIOR=B_MASSDAMP4
CARTESIAN
*BOUNDARY
BASE, 1, 6, 0.
MASSNODES, 2, 6, 0.
*AMPLITUDE, NAME=AG, TIME=TOTAL TIME
0.000000000000e+00, -1.189558708070e-02
1.000000000000e-02, 1.039359548373e-02
2.000000000000e-02, -1.229134498935e-02
3.000000000000e-02, 1.249282985361e-02
4.000000000000e-02, 2.755311714482e-02
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1.899000000000e+01, 3.785635422571e-03
*STEP, NAME=EARTHQUAKE, NLGEOM=NO, INC=100000
*DYNAMIC, DIRECT
1.000000000000e-02, 1.899000000000e+01, 1.000000000000e-10, 1.000000000000e-02
*CLOAD, AMPLITUDE=AG
1, 1, -2.500000000000e+05
2, 1, -2.700000000000e+05
3, 1, -2.700000000000e+05
4, 1, -1.800000000000e+05
*OUTPUT, FIELD, TIME INTERVAL=0.01
*NODE OUTPUT, NSET=MASSNODES
U, V, A
*ELEMENT OUTPUT, ELSET=STORY_CONNECTORS
CU, CUE, CEF, CTF
*OUTPUT, HISTORY, TIME INTERVAL=0.01
*NODE OUTPUT, NSET=MASSNODES
U1, A1
*ELEMENT OUTPUT, ELSET=STORY_CONNECTORS
CU1, CEF1, CTF1
*END STEP
