*HEADING
Example 6 intended ABAQUS Bouc-Wen UEL benchmark, generated in this run
*PREPRINT, ECHO=NO, MODEL=NO, HISTORY=NO, CONTACT=NO
*NODE
11, 0, 0.0
12, 6, 0.0
13, 12, 0.0
101, 0, 0
102, 6, 0
103, 12, 0
111, 0, 3.6
112, 6, 3.6
113, 12, 3.6
121, 0, 7.2
122, 6, 7.2
123, 12, 7.2
131, 0, 10.8
132, 6, 10.8
133, 12, 10.8
*ELEMENT, TYPE=B23, ELSET=COLUMNS
1, 101, 111
2, 111, 121
3, 121, 131
4, 102, 112
5, 112, 122
6, 122, 132
7, 103, 113
8, 113, 123
9, 123, 133
*ELEMENT, TYPE=B23, ELSET=BEAMS
10, 111, 112
11, 112, 113
12, 121, 122
13, 122, 123
14, 131, 132
15, 132, 133
*USER ELEMENT, TYPE=U1, NODES=2, COORDINATES=2, PROPERTIES=11, VARIABLES=6, UNSYMM
1, 2, 6
*ELEMENT, TYPE=U1, ELSET=ISOLATORS
9001, 11, 101
9002, 12, 102
9003, 13, 103
*UEL PROPERTY, ELSET=ISOLATORS
2000000, 0.05, 2, 20000, 20000, 1, 0, 0, 0, 10000000000, 0.00706719882471
*MATERIAL, NAME=STEEL
*ELASTIC
206000000000, 0.3
*DENSITY
1e-12
*DAMPING, BETA=0.00706719882471
*BEAM SECTION, SECTION=RECT, ELSET=COLUMNS, MATERIAL=STEEL
0.0288675134595, 0.692820323028
*BEAM SECTION, SECTION=RECT, ELSET=BEAMS, MATERIAL=STEEL
0.025, 0.6
*NSET, NSET=GROUND
11, 12, 13
*BOUNDARY
GROUND, 1, 6, 0.0
*EQUATION
2
111, 1, 1.0, 112, 1, -1.0
*EQUATION
2
113, 1, 1.0, 112, 1, -1.0
*EQUATION
2
121, 1, 1.0, 122, 1, -1.0
*EQUATION
2
123, 1, 1.0, 122, 1, -1.0
*EQUATION
2
131, 1, 1.0, 132, 1, -1.0
*EQUATION
2
133, 1, 1.0, 132, 1, -1.0
*ELEMENT, TYPE=MASS, ELSET=MASS_111
20010, 111
*MASS, ELSET=MASS_111, TYPE=ANISOTROPIC, ALPHA=0.186496975085
83333.3333333, 83333.3333333, 0.0
*ELEMENT, TYPE=MASS, ELSET=MASS_112
20011, 112
*MASS, ELSET=MASS_112, TYPE=ANISOTROPIC, ALPHA=0.186496975085
83333.3333333, 83333.3333333, 0.0
*ELEMENT, TYPE=MASS, ELSET=MASS_113
20012, 113
*MASS, ELSET=MASS_113, TYPE=ANISOTROPIC, ALPHA=0.186496975085
83333.3333333, 83333.3333333, 0.0
*ELEMENT, TYPE=MASS, ELSET=MASS_121
20020, 121
*MASS, ELSET=MASS_121, TYPE=ANISOTROPIC, ALPHA=0.186496975085
83333.3333333, 83333.3333333, 0.0
*ELEMENT, TYPE=MASS, ELSET=MASS_122
20021, 122
*MASS, ELSET=MASS_122, TYPE=ANISOTROPIC, ALPHA=0.186496975085
83333.3333333, 83333.3333333, 0.0
*ELEMENT, TYPE=MASS, ELSET=MASS_123
20022, 123
*MASS, ELSET=MASS_123, TYPE=ANISOTROPIC, ALPHA=0.186496975085
83333.3333333, 83333.3333333, 0.0
*ELEMENT, TYPE=MASS, ELSET=MASS_131
20030, 131
*MASS, ELSET=MASS_131, TYPE=ANISOTROPIC, ALPHA=0.186496975085
83333.3333333, 83333.3333333, 0.0
*ELEMENT, TYPE=MASS, ELSET=MASS_132
20031, 132
*MASS, ELSET=MASS_132, TYPE=ANISOTROPIC, ALPHA=0.186496975085
83333.3333333, 83333.3333333, 0.0
*ELEMENT, TYPE=MASS, ELSET=MASS_133
20032, 133
*MASS, ELSET=MASS_133, TYPE=ANISOTROPIC, ALPHA=0.186496975085
83333.3333333, 83333.3333333, 0.0
*STEP, NAME=STATIC_CHECK, NLGEOM=NO
*STATIC
1.0, 1.0, 1.0e-05, 1.0
*CLOAD
132, 1, 1.0
*OUTPUT, FIELD
*NODE OUTPUT
U, RF
*NODE PRINT, FREQUENCY=0
*END STEP
