*HEADING
Example 5: 4-story isolated shear building, truss plasticity
*PREPRINT,ECHO=NO,MODEL=NO,HISTORY=NO
*NODE
1, 0.0, 0.0
2, 1.0, 0.0
3, 2.0, 0.0
4, 3.0, 0.0
5, 4.0, 0.0
*NSET,NSET=BASE
1
*NSET,NSET=TOP
5
*ELEMENT,TYPE=T2D2,ELSET=SPRING1
1, 1, 2
*ELEMENT,TYPE=T2D2,ELSET=SPRING2
2, 2, 3
*ELEMENT,TYPE=T2D2,ELSET=SPRING3
3, 3, 4
*ELEMENT,TYPE=T2D2,ELSET=SPRING4
4, 4, 5
*ELEMENT,TYPE=DASHPOT2,ELSET=DASHPOT1
201, 1, 2
*DASHPOT,ELSET=DASHPOT1
1, 1
1.7382563870e+05,
*ELEMENT,TYPE=DASHPOT2,ELSET=DASHPOT2
202, 2, 3
*DASHPOT,ELSET=DASHPOT2
1, 1
8.5174562965e+05,
*ELEMENT,TYPE=DASHPOT2,ELSET=DASHPOT3
203, 3, 4
*DASHPOT,ELSET=DASHPOT3
1, 1
6.7791999094e+05,
*ELEMENT,TYPE=DASHPOT2,ELSET=DASHPOT4
204, 4, 5
*DASHPOT,ELSET=DASHPOT4
1, 1
3.4069825186e+05,
*ELEMENT,TYPE=DASHPOT2,ELSET=ALPHA_DASHPOT1
301, 1, 2
*DASHPOT,ELSET=ALPHA_DASHPOT1
1, 1
1.2648223293e+05,
*ELEMENT,TYPE=DASHPOT2,ELSET=ALPHA_DASHPOT2
302, 1, 3
*DASHPOT,ELSET=ALPHA_DASHPOT2
1, 1
1.3660081157e+05,
*ELEMENT,TYPE=DASHPOT2,ELSET=ALPHA_DASHPOT3
303, 1, 4
*DASHPOT,ELSET=ALPHA_DASHPOT3
1, 1
1.3660081157e+05,
*ELEMENT,TYPE=DASHPOT2,ELSET=ALPHA_DASHPOT4
304, 1, 5
*DASHPOT,ELSET=ALPHA_DASHPOT4
1, 1
9.1067207712e+04,
*ELEMENT,TYPE=MASS,ELSET=MASS1
101, 2
*MASS,ELSET=MASS1
250000.0,
*ELEMENT,TYPE=MASS,ELSET=MASS2
102, 3
*MASS,ELSET=MASS2
270000.0,
*ELEMENT,TYPE=MASS,ELSET=MASS3
103, 4
*MASS,ELSET=MASS3
270000.0,
*ELEMENT,TYPE=MASS,ELSET=MASS4
104, 5
*MASS,ELSET=MASS4
180000.0,
*MATERIAL,NAME=MAT1
*DENSITY
1.0e-12,
*ELASTIC
5.0000000000e+07, 0.0
*PLASTIC,HARDENING=COMBINED,DATA TYPE=PARAMETERS,NUMBER BACKSTRESSES=1
5.0000000000e+05, 2.6315789474e+06, 0.0
*SOLID SECTION,ELSET=SPRING1,MATERIAL=MAT1
1.0,
*MATERIAL,NAME=MAT2
*DENSITY
1.0e-12,
*ELASTIC
2.4500000000e+08, 0.0
*PLASTIC,HARDENING=COMBINED,DATA TYPE=PARAMETERS,NUMBER BACKSTRESSES=1
1.2250000000e+06, 0.0000000000e+00, 0.0
*SOLID SECTION,ELSET=SPRING2,MATERIAL=MAT2
1.0,
*MATERIAL,NAME=MAT3
*DENSITY
1.0e-12,
*ELASTIC
1.9500000000e+08, 0.0
*PLASTIC,HARDENING=COMBINED,DATA TYPE=PARAMETERS,NUMBER BACKSTRESSES=1
9.7500000000e+05, 0.0000000000e+00, 0.0
*SOLID SECTION,ELSET=SPRING3,MATERIAL=MAT3
1.0,
*MATERIAL,NAME=MAT4
*DENSITY
1.0e-12,
*ELASTIC
9.8000000000e+07, 0.0
*PLASTIC,HARDENING=COMBINED,DATA TYPE=PARAMETERS,NUMBER BACKSTRESSES=1
4.9000000000e+05, 0.0000000000e+00, 0.0
*SOLID SECTION,ELSET=SPRING4,MATERIAL=MAT4
1.0,
*BOUNDARY
BASE, 1, 2
2, 2, 2
3, 2, 2
4, 2, 2
5, 2, 2
*AMPLITUDE,NAME=GM,TIME=TOTAL TIME
0.000000, -3.0325307523e-03
0.010000, 2.6496294565e-03
0.020000, -3.1334209412e-03
0.030000, 3.1847852869e-03
0.040000, 7.0240900677e-03
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18.990000, 9.6506845420e-04
*STEP,NAME=DYNAMIC,NLGEOM=NO,INC=1919
*DYNAMIC,ALPHA=0.0,DIRECT
0.010000,18.990000,0.000100,0.010000
*GLOBAL DAMPING, ALPHA=0.0000000000e+00, BETA=0.0
*CLOAD, AMPLITUDE=GM
2, 1, -9.8100000000e+05
3, 1, -1.0594800000e+06
4, 1, -1.0594800000e+06
5, 1, -7.0632000000e+05
*OUTPUT, FIELD, FREQUENCY=1
*NODE OUTPUT
U, V, A, RF
*ELEMENT OUTPUT, ELSET=SPRING1
S, E, PE, PEEQ
*ELEMENT OUTPUT, ELSET=SPRING2
S, E, PE, PEEQ
*ELEMENT OUTPUT, ELSET=SPRING3
S, E, PE, PEEQ
*ELEMENT OUTPUT, ELSET=SPRING4
S, E, PE, PEEQ
*END STEP
