*HEADING
Example 6: 3-story 2-bay elastic frame with Bouc-Wen UEL isolators
*PREPRINT, ECHO=NO, MODEL=NO, HISTORY=NO, CONTACT=NO
*NODE
101, 0.00000000, 0.0
102, 6.00000000, 0.0
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*NSET, NSET=GROUND
101, 102, 103
*NSET, NSET=BASE_TOP
1, 2, 3
*NSET, NSET=FLOOR1
11, 12, 13
*NSET, NSET=FLOOR2
21, 22, 23
*NSET, NSET=ROOF
31, 32, 33
*NSET, NSET=MASS_NODES
11, 12, 13, 21, 22, 23, 31, 32, 33
*ELEMENT, TYPE=B23, ELSET=COLUMNS
1, 1, 11
2, 11, 21
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*ELEMENT, TYPE=B23, ELSET=BEAMS
10, 11, 12
11, 12, 13
12, 21, 22
13, 22, 23
14, 31, 32
15, 32, 33
*USER ELEMENT, TYPE=U100, NODES=2, COORDINATES=2, PROPERTIES=8, VARIABLES=6
1, 2
*ELEMENT, TYPE=U100, ELSET=ISO_H
1001, 101, 1
1002, 102, 2
1003, 103, 3
*UEL PROPERTY, ELSET=ISO_H
2.000000000000e+06, 5.000000000000e-02, 2.000000000000e+00, 2.000000000000e+04, 2.000000000000e+04, 1.000000000000e+00, 1.000000000000e+10, 7.067198824707e-03
*ELEMENT, TYPE=MASS, ELSET=FLOOR_MASS
2001, 11
2002, 12
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*MASS, ELSET=FLOOR_MASS, TYPE=ANISOTROPIC
8.333333333333e+04, 0.0, 0.0
*ELEMENT, TYPE=DASHPOT1, ELSET=MASS_PROP_DASHPOTS
3001, 11
3002, 12
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*DASHPOT, ELSET=MASS_PROP_DASHPOTS
1,
1.554141459043e+04,
*MATERIAL, NAME=STEEL_RAYLEIGH
*DENSITY
1.000000000000e-09
*ELASTIC
2.060000000000e+11, 3.000000000000e-01
*DAMPING, ALPHA=0.0, BETA=7.067198824707e-03
*BEAM SECTION, SECTION=RECT, MATERIAL=STEEL_RAYLEIGH, ELSET=COLUMNS
2.886751345948e-02, 6.928203230276e-01
0.0, 0.0, -1.0
*BEAM SECTION, SECTION=RECT, MATERIAL=STEEL_RAYLEIGH, ELSET=BEAMS
2.500000000000e-02, 6.000000000000e-01
0.0, 0.0, -1.0
*EQUATION
2
12, 1, 1.0, 11, 1, -1.0
*EQUATION
2
13, 1, 1.0, 11, 1, -1.0
*EQUATION
2
22, 1, 1.0, 21, 1, -1.0
*EQUATION
2
23, 1, 1.0, 21, 1, -1.0
*EQUATION
2
32, 1, 1.0, 31, 1, -1.0
*EQUATION
2
33, 1, 1.0, 31, 1, -1.0
*BOUNDARY
GROUND, 1, 2
*AMPLITUDE, NAME=GM_ACCEL, DEFINITION=TABULAR, TIME=TOTAL TIME, SMOOTH=0.0
0.00000000, -1.189965067191e-02, 0.01000000, 1.039714598720e-02, 0.02000000, -1.229554377342e-02, 0.03000000, 1.249709746590e-02
0.04000000, 2.756252942552e-02, 0.05000000, 3.971277108434e-02, 0.06000000, 1.746754043758e-02, 0.07000000, -7.504317485990e-03
0.08000000, 1.652170077268e-04, 0.09000000, -2.401208551879e-02, 0.10000000, 8.983865378662e-03, 0.11000000, -2.402775365331e-02
0.12000000, -5.895333944062e-02, 0.13000000, -4.099894643071e-02, 0.14000000, -2.089268885084e-02, 0.15000000, 1.588828172680e-02
0.16000000, 2.779234525938e-02, 0.17000000, -1.006191732425e-02, 0.18000000, 2.266060975101e-02, 0.19000000, 6.454081437444e-02
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18.96000000, -2.907083528661e-03, 18.97000000, -8.599128385593e-04, 18.98000000, 1.412566617598e-03, 18.99000000, 3.786928614300e-03
*STEP, NAME=DYNAMIC_GM, NLGEOM=NO, INC=200000
*DYNAMIC, ALPHA=0.0
0.00500000, 18.99000000, 1.0e-7, 0.01000000
*CLOAD, AMPLITUDE=GM_ACCEL
11, 1, -2.500000000000e+05
21, 1, -2.500000000000e+05
31, 1, -2.500000000000e+05
*OUTPUT, FIELD, FREQUENCY=1
*NODE OUTPUT, NSET=BASE_TOP
U
*NODE OUTPUT, NSET=FLOOR1
U
*NODE OUTPUT, NSET=FLOOR2
U
*NODE OUTPUT, NSET=ROOF
U
*NODE OUTPUT, NSET=GROUND
U, RF
*END STEP
